# ============================================================================
#  S1: a-SiO2 벌크 -> 슬랩 (z 진공 추가, boundary p p f)
# ============================================================================
#  입력 : ../init_struct/sio2_quenched.data  (2160 atoms, Si 720 / O 1440,
#                                             rho = 2.607 g/cc, 박스 28.73 x 28.83 x 33.27)
#  출력 : slab_raw.data     <- S2(표면 이완)의 입력
#         zprof_*_raw.dat   <- S2 전후 비교용 z-밀도 프로파일 baseline
#         slab_raw.lammpstrj
#
#  실행 : lmp_serial -in in.slab -log log.slab
#
#  이 단계는 동역학을 돌리지 않는다(run 0). 목적은 세 가지뿐:
#   (1) PPPM slab 설정이 에러 없이 뜨는지
#   (2) 절단 직후 PE / 배위수 / pzz 를 기록해 S2 이완의 '전(before)' 기준을 확보
#   (3) 원자 손실 0 확인
# ============================================================================

# ---------------- 1. Init ----------------
units           metal
boundary        p p p              # 원본 데이터는 전 방향 주기이므로 그대로 읽는다
atom_style      charge

read_data       ../init_struct/sio2_quenched.data

mass            1 15.9994          # O
mass            2 28.0855          # Si
# 전하는 data 파일에 이미 들어있다 (O -1.2 / Si +2.4). set 으로 재지정하지 않는다.

# ---------------- 2. 진공 추가 + z 비주기화 ----------------
#  [순서 중요] (a) 먼저 z 를 늘리고 (b) 그 다음 boundary 를 f 로 바꾼다.
#   반대로 하면 zhi(34.087) 경계에 걸친 원자가 lost 될 수 있다.
#
#  [remap 금지] remap 을 쓰면 좌표가 박스와 함께 스케일링되어 슬랩 자체가
#   z 방향으로 3.6배 늘어난다. 절대 쓰지 말 것. 원자는 z=0.82~34.09 에 그대로 두고
#   박스만 위로 연다 -> 기존 z 주기경계면이 그대로 절단면이 되어
#   상(z~34.09) / 하(z~0.82) 두 개의 표면이 생긴다. 하단은 S2 에서 고정한다.
#
#  [z=120 A 근거] slab-slab 이미지 간격 = 3*Lz - 두께 = 360 - 54 = 306 A 로 충분.
#   실제 제약은 정전기가 아니라 기하학이다:
#     0~34    SiO2 슬랩
#     ~34~65  Cu (섬 성장 최악 시나리오 포함)
#     90~95   S5 의 fix deposit 삽입 영역 (막 상단과 25 A 이상 이격)
#     118     S5 의 상단 반사벽
change_box      all z final 0.0 120.0 units box
change_box      all boundary p p f

# z 이미지플래그 초기화 (이후 MSD/unwrap 분석에서 z 방향 오염 방지)
set             group all image NULL NULL 0

# ---------------- 3. Force field ----------------
#  melt-quench 와 완전히 동일. kspace_modify slab 3.0 도 이 안에 있다.
include         ../common/ff_sio2.in

# ---------------- 4. 검증용 진단량 ----------------
group           gO   type 1
group           gSi  type 2

compute         cnSi all coord/atom cutoff 2.0 1     # 각 원자 주변 O  개수
compute         cnO  all coord/atom cutoff 2.0 2     # 각 원자 주변 Si 개수
compute         avgSi gSi reduce ave c_cnSi          # <CN(Si-O)>  벌크값 4.017
compute         avgO  gO  reduce ave c_cnO           # <CN(O-Si)>  벌크값 2.008
variable        pea equal pe/atoms

thermo_style    custom step atoms pe v_pea press pxx pyy pzz vol c_avgSi c_avgO
thermo          1
run             0

# ---------------- 5. z-밀도 프로파일 (S2 비교 baseline) ----------------
compute         chO  gO  chunk/atom bin/1d z lower 0.5 units box
compute         chSi gSi chunk/atom bin/1d z lower 0.5 units box
fix             pO  gO  ave/chunk 1 1 1 c_chO  density/mass file zprof_O_raw.dat
fix             pSi gSi ave/chunk 1 1 1 c_chSi density/mass file zprof_Si_raw.dat
run             0
unfix           pO
unfix           pSi

# ---------------- 6. 출력 ----------------
write_data      slab_raw.data
write_dump      all atom slab_raw.lammpstrj
